# NALD affine force field: isotropic volumetric deformation
# Xi_bulk = - d f / d epsilon_v, where epsilon_v = Delta V / V.
# A central finite difference is used. For isotropic linear scale s,
# epsilon_v=s^3-1, so s+ and s- correspond exactly to +/- deltaV/2.

variable        temp equal 300
variable        deltaV equal 1.0e-5

units           real
dimension       3
boundary        p p p
atom_style      full

bond_style      harmonic
angle_style     harmonic
dihedral_style  harmonic
pair_style      lj/cut/coul/long 9.0
pair_modify     mix arithmetic
pair_modify     tail yes
kspace_style    pppm 1e-5
special_bonds   amber

read_data       data.rst.${temp}
timestep        1.0
run             0

variable        volume equal vol
print           "${volume}" file volume.data screen no

# Exact isotropic scale factors corresponding to epsilon_v = +/- deltaV/2.
variable        sminus equal (1.0-0.5*${deltaV})^(1.0/3.0)
variable        splus  equal (1.0+0.5*${deltaV})^(1.0/3.0)
variable        ratio  equal ${splus}/${sminus}

# First evaluate at -deltaV/2.
change_box      all x scale ${sminus} y scale ${sminus} z scale ${sminus} remap units box
run             0
fix             minus all store/state 0 fx fy fz

# Move from the minus state to the plus state.
change_box      all x scale ${ratio} y scale ${ratio} z scale ${ratio} remap units box
run             0
fix             plus all store/state 0 fx fy fz

# Xi_K=-df/d epsilon_v.
variable        XiX atom (f_minus[1]-f_plus[1])/${deltaV}
variable        XiY atom (f_minus[2]-f_plus[2])/${deltaV}
variable        XiZ atom (f_minus[3]-f_plus[3])/${deltaV}
# Include atom ID and mass for mass-weighted normal-mode projection.
write_dump      all custom AF_bulk.data id mass v_XiX v_XiY v_XiZ modify sort id format line "%d %.15g %.15g %.15g %.15g"

unfix           plus
unfix           minus

# Restore the original box from the + state.
variable        sinv equal 1.0/${splus}
change_box      all x scale ${sinv} y scale ${sinv} z scale ${sinv} remap units box
run             0 pre yes post no
